// COMSOL Multiphysics 6.3.0.290 model "同轴电缆电极.mph"
// Outline of the model tree

Parameters
  r_cable = 1[cm]  // 电缆芯线半径
  thick_insulate = 5.5[cm]  // 绝缘层厚度
  thick_shield = 1[cm]  // 屏蔽层厚度
  V0 = 110000[V]  // 施加电压

Probes
  pdom1: DomainPoint "域点探针 1" | coords = {0, 3.75}
    ppb1: PointExpr "点探针表达式 1" | expr = V; unit = V; descr = 电势; table = tbl1

Geometry
  geom1 "几何 1" (2D, length unit cm)
    c1: Circle "芯线" | r = r_cable
    c2: Circle "绝缘层" | r = r_cable+thick_insulate
    c3: Circle "屏蔽层" | r = r_cable+thick_insulate+thick_shield
    fin: Finalize "形成联合体"

Materials
  mat1: Common "Copper" on all domains
    def: def "Basic"
      relpermeability = 1
      electricconductivity = 5.998e7[S/m]
      thermalexpansioncoefficient = 17e-6[1/K]
      heatcapacity = 385[J/(kg*K)]
      relpermittivity = 1
      density = 8960[kg/m^3]
      thermalconductivity = 400[W/(m*K)]
    Enu: Enu "Young's modulus and Poisson's ratio"
      E = 110[GPa]
      nu = 0.35
    linzRes: linzRes "Linearized resistivity"
      rho0 = 1.72e-8[ohm*m]
      alpha = 0.0039[1/K]
      Tref = 298[K]
  mat2: Common "硅橡胶" on domains 2
    def: def "基本"
      relpermittivity = 3.2

Physics
  es: Electrostatics "静电" on all domains
    dependent variable V
    fsp1: FreeSpace "自由空间 1" (default)
    zc1: ZeroCharge "零电荷 1" (default)
    init1: init "初始值 1" (default)
    term1: DomainTerminal "终端 1" on domains 3 | TerminalType = Voltage; V0 = V0
    term2: DomainTerminal "终端 2" on domains 1 | TerminalType = Voltage; V0 = 0

Mesh
  mesh1 "网格 1" (physics-controlled)
    size: MeshSizeDefault "大小" | hauto = 4

Studies
  std1 "研究 1"
    stat: Stationary "稳态"

Solver configurations
  sol1 "解 1" (study std1)
    v1: Variables "因变量 1"
    s1: Stationary "稳态求解器 1"
      dDef: Direct "直接"
      fc1: FullyCoupled "全耦合 1"

Datasets
  dset1: Solution | solution = sol1
  dset2: Solution "探针解 2" | solution = sol1
  cpt1: CutPoint2D "域点探针 1" | data = dset2; pointx = 0; pointy = 3.75

Derived values
  pev1: EvalPoint "点探针表达式 1" | data = cpt1; table = tbl1; expr = {V, es.normE}; descr = {电势, 电场模}

Tables
  tbl1: Table "探针表 1"
    电势 (V), 点: (0, 3.75) | 电场模 (V/m), 点: (0, 3.75)
    32339.6 | 1.57395e+06

Plots
  pg1: PlotGroup2D "电势 (es)" | data = dset1
    con1: Contour "等值线 1" | expr = V
  pg2: PlotGroup2D "电场 (es)" | data = dset1
    surf1: Surface "表面 1" | expr = es.normE
    str1: Streamline "流线 1" on boundaries 1-12 | expr = {es.Ex, es.Ey}; udist = 0.02; maxsteps = 5000
      col1: Color "颜色表达式 1" | expr = es.normE
      filt1: Filter "过滤器 1" | expr = !isScalingSystemDomain
  pg3: PlotGroup1D "探针绘图组 3"
    tblp1: Table "探针表图 1" | table = tbl1; xaxisdata = auto; plotcolumns = 1