// COMSOL Multiphysics 6.3.0.290 model "金属槽.mph"
// Outline of the model tree

Geometry
  geom1 "几何 1" (2D, length unit cm)
    r1: Rectangle "矩形 1" | size = {40, 20}
    pt1: Point "点 1" | p = {10, 4}
    fin: Finalize "形成联合体"

Materials
  mat1: Common "Air" on domains 1
    def: def "Basic"
      thermalexpansioncoefficient = alpha_p(pA,T)
      molarmass = 0.02897[kg/mol]
      bulkviscosity = muB(T)
      relpermeability = 1
      relpermittivity = 1
      dynamicviscosity = eta(T)
      ratioofspecificheat = 1.4
      electricconductivity = 0[S/m]
      heatcapacity = Cp(T)
      density = rho(pA,T)
      thermalconductivity = k(T)
      soundspeed = cs(T)
      eta: Piecewise | arg = T; pieces = {200.0, 1600.0, -8.38278E-7+8.35717342E-8*T^1-7.69429583E-11*T^2+4.6437266E-14*T^3-1.06585607E-17*T^4}; argunit = K; fununit = Pa*s
      Cp: Piecewise | arg = T; pieces = {200.0, 1600.0, 1047.63657-0.372589265*T^1+9.45304214E-4*T^2-6.02409443E-7*T^3+1.2858961E-10*T^4}; argunit = K; fununit = J/(kg*K)
      rho: Analytic | expr = pA*0.02897/R_const[K*mol/J]/T; args = {pA, T}; fununit = kg/m^3; argunit = {Pa, K}
      k: Piecewise | arg = T; pieces = {200.0, 1600.0, -0.00227583562+1.15480022E-4*T^1-7.90252856E-8*T^2+4.11702505E-11*T^3-7.43864331E-15*T^4}; argunit = K; fununit = W/(m*K)
      cs: Analytic | expr = sqrt(1.4*R_const[K*mol/J]/0.02897*T); args = T; fununit = m/s; argunit = K
      an1: Analytic | funcname = alpha_p; expr = -1/rho(pA,T)*d(rho(pA,T),T); args = {pA, T}; fununit = 1/K; argunit = {Pa, K}
      an2: Analytic "Analytic 2a" | funcname = muB; expr = 0.6*eta(T); args = T; fununit = Pa*s; argunit = K
    RefractiveIndex: RefractiveIndex
      n = 1
      ki = 0
    NonlinearModel: NonlinearModel
      BA = def.gamma-1
    idealGas: idealGas
      Rs = R_const/Mn
      heatcapacity = Cp(T)
      ratioofspecificheat = 1.4
      molarmass = 0.02897[kg/mol]
      Cp: Piecewise | arg = T; pieces = {200.0, 1600.0, 1047.63657-0.372589265*T^1+9.45304214E-4*T^2-6.02409443E-7*T^3+1.2858961E-10*T^4}; argunit = K; fununit = J/(kg*K)

Physics
  es: Electrostatics "静电" on all domains
    dependent variable V
    fsp1: FreeSpace "自由空间 1" (default)
    zc1: ZeroCharge "零电荷 1" (default)
    init1: init "初始值 1" (default)
    gnd1: Ground "接地 1" on boundaries 1, 2, 4
    pot1: ElectricPotential "电势 1" on boundaries 3 | V0 = 100

Mesh
  mesh1 "网格 1" (physics-controlled)
    size: MeshSizeDefault "大小" | hauto = 4

Studies
  std1 "研究 1"
    stat: Stationary "稳态"

Solver configurations
  sol1 "解 1" (study std1)
    v1: Variables "因变量 1"
    s1: Stationary "稳态求解器 1"
      dDef: Direct "直接"
      fc1: FullyCoupled "全耦合 1"

Datasets
  dset1: Solution | solution = sol1

Derived values
  pev1: EvalPoint "点计算 1" on points 3
    data = dset1
    table = tbl1
    expr = {es.normE, V}
    unit = {V/m, V}
    descr = {电场模, 电势}

Tables
  tbl1: Table "表格 1"
    // 点计算 1
    电场模 (V/m), 点: 3 | 电势 (V), 点: 3
    349.805 | 13.0467

Plots
  pg1: PlotGroup2D "电势 (es)" | data = dset1
    con1: Contour "等值线 1" | expr = V
  pg2: PlotGroup2D "电场 (es)" | data = dset1
    surf1: Surface "表面 1" | expr = es.normE
    str1: Streamline "流线 1" on boundaries 1-4 | expr = {es.Ex, es.Ey}; udist = 0.02; maxsteps = 5000
      col1: Color "颜色表达式 1" | expr = es.normE
      filt1: Filter "过滤器 1" | expr = !isScalingSystemDomain