// COMSOL Multiphysics 6.3.0.290 model "螺线管磁场_含铁芯.mph"
// Outline of the model tree

Parameters
  r_inner = 2.7[cm]  // 线圈内径
  r_outer = 3.1[cm]  // 线圈外径
  height = 23[cm]  // 线圈高度

Geometry
  geom1 "几何 1" (2D axisymmetric, length unit cm)
    r1: Rectangle "矩形 1" | size = {r_outer-r_inner, height}; pos = {r_inner, 0}
    r2: Rectangle "矩形 2" | size = {20, 90}; pos = {0, -30}
    r3: Rectangle "矩形 3" | size = {r_inner, height+5}; pos = {0, -2.5}
    fin: Finalize "形成联合体"

Materials
  mat1: Common "Air" on all domains
    def: def "Basic"
      thermalexpansioncoefficient = alpha_p(pA,T)
      molarmass = 0.02897[kg/mol]
      bulkviscosity = muB(T)
      relpermeability = 1
      relpermittivity = 1
      dynamicviscosity = eta(T)
      ratioofspecificheat = 1.4
      electricconductivity = 0[S/m]
      heatcapacity = Cp(T)
      density = rho(pA,T)
      thermalconductivity = k(T)
      soundspeed = cs(T)
      eta: Piecewise | arg = T; pieces = {200.0, 1600.0, -8.38278E-7+8.35717342E-8*T^1-7.69429583E-11*T^2+4.6437266E-14*T^3-1.06585607E-17*T^4}; argunit = K; fununit = Pa*s
      Cp: Piecewise | arg = T; pieces = {200.0, 1600.0, 1047.63657-0.372589265*T^1+9.45304214E-4*T^2-6.02409443E-7*T^3+1.2858961E-10*T^4}; argunit = K; fununit = J/(kg*K)
      rho: Analytic | expr = pA*0.02897/R_const[K*mol/J]/T; args = {pA, T}; fununit = kg/m^3; argunit = {Pa, K}
      k: Piecewise | arg = T; pieces = {200.0, 1600.0, -0.00227583562+1.15480022E-4*T^1-7.90252856E-8*T^2+4.11702505E-11*T^3-7.43864331E-15*T^4}; argunit = K; fununit = W/(m*K)
      cs: Analytic | expr = sqrt(1.4*R_const[K*mol/J]/0.02897*T); args = T; fununit = m/s; argunit = K
      an1: Analytic | funcname = alpha_p; expr = -1/rho(pA,T)*d(rho(pA,T),T); args = {pA, T}; fununit = 1/K; argunit = {Pa, K}
      an2: Analytic "Analytic 2a" | funcname = muB; expr = 0.6*eta(T); args = T; fununit = Pa*s; argunit = K
    RefractiveIndex: RefractiveIndex
      n = 1
      ki = 0
    NonlinearModel: NonlinearModel
      BA = def.gamma-1
    idealGas: idealGas
      Rs = R_const/Mn
      heatcapacity = Cp(T)
      ratioofspecificheat = 1.4
      molarmass = 0.02897[kg/mol]
      Cp: Piecewise | arg = T; pieces = {200.0, 1600.0, 1047.63657-0.372589265*T^1+9.45304214E-4*T^2-6.02409443E-7*T^3+1.2858961E-10*T^4}; argunit = K; fununit = J/(kg*K)
  mat2: Common "Copper" on domains 3
    def: def "Basic"
      relpermeability = 1
      electricconductivity = 5.998e7[S/m]
      thermalexpansioncoefficient = 17e-6[1/K]
      heatcapacity = 385[J/(kg*K)]
      relpermittivity = 1
      density = 8960[kg/m^3]
      thermalconductivity = 400[W/(m*K)]
    Enu: Enu "Young's modulus and Poisson's ratio"
      E = 110[GPa]
      nu = 0.35
    linzRes: linzRes "Linearized resistivity"
      rho0 = 1.72e-8[ohm*m]
      alpha = 0.0039[1/K]
      Tref = 298[K]
  mat3: Common "Iron" on domains 2
    def: def "Basic"
      relpermeability = 4000
      electricconductivity = 1.12e7[S/m]
      thermalexpansioncoefficient = 12.2e-6[1/K]
      heatcapacity = 440[J/(kg*K)]
      relpermittivity = 1
      density = 7870[kg/m^3]
      thermalconductivity = 76.2[W/(m*K)]
    Enu: Enu "Young's modulus and Poisson's ratio"
      E = 200[GPa]
      nu = 0.29

Physics
  mf: InductionCurrents "磁场" on all domains
    dependent variable A = {Ar, Aphi, Az}
    fsp1: FreeSpace "自由空间 1" (default)
    axi1: AxialSymmetry "轴对称 1" (default)
    mi1: MagneticInsulation "磁绝缘 1" (default)
    init1: init "初始值 1" (default)
    als1: AmperesLawSolid "固体中的安培定律 1" on domains 2 | mur_mat = from_mat
    coil1: Coil "线圈 1" on domains 3 | ConductorModel = Multi; ICoil = 0.5[A]; N = 1860

Mesh
  mesh1 "网格 1" (physics-controlled)
    size: MeshSizeDefault "大小" | hauto = 3

Studies
  std1 "研究 1"
    ccc: CoilCurrentCalculation "线圈几何分析"
    freq: Frequency "频域" | plist = 50

Solver configurations
  sol1 "解 1" (study std1)
    v1: Variables "因变量 1"
    s1: Stationary "稳态求解器 1"
      dDef: Direct "直接"
      fcDef: FullyCoupled "全耦合"
    su1: StoreSolution "解存储 1"
    v2: Variables "因变量 2"
    s2: Stationary "稳态求解器 2"
      dDef: Direct "直接"
      p1: Parametric "参数化 1"
      fc1: FullyCoupled "全耦合 1"
  sol2 "解存储 1" (study std1)

Datasets
  dset1: Solution | solution = sol1
  dset2: Solution | solution = sol2
  rev1: Revolve2D "二维旋转 1" | data = dset1; startangle = -90; revangle = 225
  cln1: CutLine2D "二维截线 1" | data = dset1; genpoints = {{0, -5}, {0, 28}}

Derived values
  gev1: EvalGlobal "全局计算 1" | data = dset1; table = tbl2; expr = mf.LCoil_1; unit = H; descr = 线圈电感

Tables
  tbl1: Table "表格 1"
    // 全局计算 1
    freq (Hz) | 线圈电感 (H)
    50 | 0.0423611
  tbl2: Table "表格 2"
    // 全局计算 1
    freq (Hz) | 线圈电感 (H)
    50 | 0.437704

Plots
  pg1: PlotGroup2D "磁通密度 (mf)" | data = dset1; dataisaxisym = on
    surf1: Surface "表面 1" | expr = mf.normB
    str1: Streamline "流线 1" on boundaries 1-14 | expr = {mf.Br, mf.Bz}; udist = 0.03; maxsteps = 5000
      col1: Color "颜色表达式 1" | expr = mf.normB
      filt1: Filter "过滤器 1" | expr = !isScalingSystemDomain
    con1: Contour "等值线 1" | expr = mf.Psi; levelrounding = off
      filt1: Filter "过滤器 1" | expr = !isScalingSystemDomain
  pg2: PlotGroup3D "磁通密度，回转几何 (mf)" | data = rev1
    vol1: Volume "体 1" | expr = mf.normB
    con1: Contour "等值线 1" | expr = mf.Psi; levelrounding = off
      filt1: Filter "过滤器 1" | expr = !isScalingSystemDomain
  pg3: PlotGroup1D "一维绘图组 3" | data = dset1
    lngr1: LineGraph "线结果图 1" | data = cln1; expr = mf.normH
  pg4: PlotGroup3D "三维绘图组 4" | data = rev1
    vol1: Volume "体 1" | expr = mf.Bz; descr = 磁通密度，z 分量