// COMSOL Multiphysics 6.3.0.290 model "Railgun.mph"
// Outline of the model tree

Parameters
  z0 = 0  // 钢弹默认位置

Geometry
  geom1 "几何 1" (2D axisymmetric, length unit cm)
    r1: Rectangle "炮弹" | size = {0.17, 1.18}; pos = {0, z0}
    r2: Rectangle "线圈" | size = {0.275, 2.3}; pos = {0.6, 0}
    r3: Rectangle "空气" | size = {6, 20}; pos = {0, -2.5}
    ls1: LineSegment "线段 1" | specify1 = coord; coord1 = {0.4, -2.5}; specify2 = coord; coord2 = {0.4, 17.5}
    pard1: PartitionDomains "分割域 1" | domain = r3(1) domains 1; partitionwith = lines; vertexline = ls1(1) points 1, 2
    fin: Finalize "形成联合体"

Materials
  mat1: Common "Air" on domains 1, 3
    def: def "Basic"
      thermalexpansioncoefficient = alpha_p(pA,T)
      molarmass = 0.02897[kg/mol]
      bulkviscosity = muB(T)
      relpermeability = 1
      relpermittivity = 1
      dynamicviscosity = eta(T)
      ratioofspecificheat = 1.4
      electricconductivity = 0[S/m]
      heatcapacity = Cp(T)
      density = rho(pA,T)
      thermalconductivity = k(T)
      soundspeed = cs(T)
      eta: Piecewise | arg = T; pieces = {200.0, 1600.0, -8.38278E-7+8.35717342E-8*T^1-7.69429583E-11*T^2+4.6437266E-14*T^3-1.06585607E-17*T^4}; argunit = K; fununit = Pa*s
      Cp: Piecewise | arg = T; pieces = {200.0, 1600.0, 1047.63657-0.372589265*T^1+9.45304214E-4*T^2-6.02409443E-7*T^3+1.2858961E-10*T^4}; argunit = K; fununit = J/(kg*K)
      rho: Analytic | expr = pA*0.02897/R_const[K*mol/J]/T; args = {pA, T}; fununit = kg/m^3; argunit = {Pa, K}
      k: Piecewise | arg = T; pieces = {200.0, 1600.0, -0.00227583562+1.15480022E-4*T^1-7.90252856E-8*T^2+4.11702505E-11*T^3-7.43864331E-15*T^4}; argunit = K; fununit = W/(m*K)
      cs: Analytic | expr = sqrt(1.4*R_const[K*mol/J]/0.02897*T); args = T; fununit = m/s; argunit = K
      an1: Analytic | funcname = alpha_p; expr = -1/rho(pA,T)*d(rho(pA,T),T); args = {pA, T}; fununit = 1/K; argunit = {Pa, K}
      an2: Analytic "Analytic 2a" | funcname = muB; expr = 0.6*eta(T); args = T; fununit = Pa*s; argunit = K
    RefractiveIndex: RefractiveIndex
      n = 1
      ki = 0
    NonlinearModel: NonlinearModel
      BA = def.gamma-1
    idealGas: idealGas
      Rs = R_const/Mn
      heatcapacity = Cp(T)
      ratioofspecificheat = 1.4
      molarmass = 0.02897[kg/mol]
      Cp: Piecewise | arg = T; pieces = {200.0, 1600.0, 1047.63657-0.372589265*T^1+9.45304214E-4*T^2-6.02409443E-7*T^3+1.2858961E-10*T^4}; argunit = K; fununit = J/(kg*K)
  mat2: Common "Copper" on domains 4
    def: def "Basic"
      relpermeability = 1
      electricconductivity = 5.998e7[S/m]
      thermalexpansioncoefficient = 17e-6[1/K]
      heatcapacity = 385[J/(kg*K)]
      relpermittivity = 1
      density = 8960[kg/m^3]
      thermalconductivity = 400[W/(m*K)]
    Enu: Enu "Young's modulus and Poisson's ratio"
      E = 110[GPa]
      nu = 0.35
    linzRes: linzRes "Linearized resistivity"
      rho0 = 1.72e-8[ohm*m]
      alpha = 0.0039[1/K]
      Tref = 298[K]
  mat3: Common "Iron" on domains 2
    def: def "Basic"
      relpermeability = 4000
      electricconductivity = 1.12e7[S/m]
      thermalexpansioncoefficient = 12.2e-6[1/K]
      heatcapacity = 440[J/(kg*K)]
      relpermittivity = 1
      density = 7870[kg/m^3]
      thermalconductivity = 76.2[W/(m*K)]
    Enu: Enu "Young's modulus and Poisson's ratio"
      E = 200[GPa]
      nu = 0.29

Physics
  mf: InductionCurrents "磁场" on all domains
    dependent variable A = {Ar, Aphi, Az}
    fsp1: FreeSpace "自由空间 1" (default)
    axi1: AxialSymmetry "轴对称 1" (default)
    mi1: MagneticInsulation "磁绝缘 1" (default)
    init1: init "初始值 1" (default)
    als1: AmperesLawSolid "固体中的安培定律 1" on domains 2
    coil1: Coil "线圈 1" on domains 4
      ConductorModel = Multi
      CoilExcitation = CircuitCurrent
      toBeReferencedElectricalCircuitTag = cir
      toBeCreatedElement = none
      N = 77
      materialType = from_mat
    fcal1: ForceCalculation "力计算 1" on domains 2 | ForceName = Force_z
  cir: Circuit "电路"
    dependent variable voltages
    gnd1: GroundNode "接地节点 1"
    C1: Capacitor "电容器 1" | C = 1000[uF]; v = 35; Connections = {1, 0}
    IvsU1: ModelDeviceIV "外部 I vs. U 1" | V_src = root.comp1.mf.VCoil_1; Connections = {1, 0}
  ge: GlobalEquations "全局常微分和微分代数方程"
    EquationForm.form = Automatic
    ge1: GlobalEquations "全局方程 1"
      name = v
      equation = 0.001[kg]*vt -mf.Forcez_Force_z
      initialValueU = 0
      initialValueUt = 0
      valueType = complex
      fieldName = ODE1
      DependentVariableQuantity = velocity
      CustomDependentVariableUnit = m
      SourceTermQuantity = force
      CustomSourceTermUnit = m
    ge2: GlobalEquations "全局方程 2"
      name = z
      equation = zt-v
      valueType = complex
      fieldName = ODE2
      DependentVariableQuantity = displacement
      CustomDependentVariableUnit = m
      SourceTermQuantity = velocity
      CustomSourceTermUnit = m
  ale: MovingMesh "动网格" on all domains
    fix1: FixedMesh "固定网格 1" (default)
    disp1: PrescribedMeshDisplacement "指定网格位移 1" (default) | dx = {0, 0}
    free1: FreeDeformation "自由变形 1" on domains 1
    pres1: PrescribedDeformation "指定变形 1" on domains 2 | dx = {0, z}

Mesh
  mesh1 "网格 1" (physics-controlled)
    size: MeshSizeDefault "大小" | hauto = 3

Studies
  std1 "研究 1"
    time: Transient "瞬态" | tlist = range(0,1E-6,0.01)

Solver configurations
  sol1 "解 1" (study std1)
    v1: Variables "因变量 1"
    t1: Time "瞬态求解器 1"
      dDef: Direct "直接"
      fc1: FullyCoupled "全耦合 1"

Datasets
  dset1: Solution | solution = sol1
  rev1: Revolve2D "二维旋转 1" | data = dset1; startangle = -90; revangle = 225

Derived values
  gev1: EvalGlobal "全局计算 1" | data = dset1; table = tbl1; expr = {v, z}; unit = {m/s, cm}; descr = {状态变量 v, 状态变量 z}

Tables
  tbl1: Table "表格 1"
    // 全局计算 1
    Time (s) | 状态变量 v (m/s) | 状态变量 z (cm)
    1e-06 | -1.06433e-08 | -8.12293e-13
    2e-06 | -3.66151e-08 | -3.13022e-12
    3e-06 | -4.85608e-08 | -7.14025e-12
    4e-06 | 2.81009e-08 | -6.60353e-12
    5e-06 | 3.02626e-07 | 1.37504e-11
    6e-06 | 9.11659e-07 | 8.13124e-11
    7e-06 | 2.01456e-06 | 2.38137e-10
    8e-06 | 3.79131e-06 | 5.43166e-10
    9e-06 | 6.44149e-06 | 1.07427e-09
    1e-05 | 1.01836e-05 | 1.93022e-09
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
Plots
  pg1: PlotGroup2D "磁通密度 (mf)" | data = dset1; dataisaxisym = on
    surf1: Surface "表面 1" | expr = mf.normB
    str1: Streamline "流线 1" on boundaries 1-16 | expr = {mf.Br, mf.Bz}; udist = 0.03; maxsteps = 5000
      col1: Color "颜色表达式 1" | expr = mf.normB
      filt1: Filter "过滤器 1" | expr = !isScalingSystemDomain
    con1: Contour "等值线 1" | expr = mf.Psi; levelrounding = off
      filt1: Filter "过滤器 1" | expr = !isScalingSystemDomain
  pg2: PlotGroup3D "磁通密度，回转几何 (mf)" | data = rev1
    vol1: Volume "体 1" | expr = mf.normB
    con1: Contour "等值线 1" | expr = mf.Psi; levelrounding = off
      filt1: Filter "过滤器 1" | expr = !isScalingSystemDomain
  pg3: PlotGroup1D "一维绘图组 3" | data = dset1
    glob1: Global "全局 1" | expr = {v, z}; unit = {m/s, cm}; descr = {状态变量 v, 状态变量 z}
  pg4: PlotGroup1D "一维绘图组 4" | data = dset1
    glob1: Global "全局 1" | expr = cir.IvsU1.i; unit = A; descr = 通过器件“IvsU1”的电流
  pg5: PlotGroup1D "一维绘图组 5" | data = dset1
    glob1: Global "全局 1" | expr = {mf.Forcez_Force_z, }